// COMSOL Multiphysics 6.2.0.339 model "pn junction.mph"
// Outline of the model tree

Parameters
  n_type_c = 1e16[1/cm^3]  // n type
  p_type_c = 3e16[1/cm^3]  // p type

Geometry
  geom1 "Geometry 1" (2D, length unit µm)
    r1: Rectangle | layername = Layer 1; layer = 0.5; layerleft = on; layerbottom = off; size = {1, 0.2}
    fin: Finalize "Form Union"

Materials
  mat1: Common "Si - Silicon" on all domains
    def "Basic"
      relpermittivity = 11.7
      thermalconductivity = 131[W/(m*K)]
      density = 2329[kg/m^3]
      heatcapacity = 700[J/(kg*K)]
    AroraMobilityModel
      mun0_ref_arora = 1252[cm^2/(V*s)]
      mup0_ref_arora = 407[cm^2/(V*s)]
      mun_min_ref_arora = 88[cm^2/(V*s)]
      mup_min_ref_arora = 54.3[cm^2/(V*s)]
      Nn0_ref_arora = 1.26e17[1/cm^3]
      Np0_ref_arora = 2.35e17[1/cm^3]
      alpha0_arora = 0.88
      beta1_arora = -0.57
      beta2_arora = -2.33
      beta3_arora = -2.33
      beta4_arora = -0.146
      Tref_arora = 300[K]
    PowerLawMobilityModel
      mun0_pl = 1448[cm^2/(V*s)]
      mup0_pl = 473[cm^2/(V*s)]
      alphan_pl = 2.33
      alphap_pl = 2.23
      Tref_pl = 300[K]
    Auger "Auger recombination"
      Cn = 2.8e-31[cm^6/s]
      Cp = 9.9e-32[cm^6/s]
    Direct "Direct recombination"
      C = 0[cm^3/s]
    SRH "Shockley–Read–Hall recombination"
      taun = 10[us]
      taup = 10[us]
    FletcherMobilityModel
      F1_fl = 1.04e21[1/(cm^1*V*s)]
      F2_fl = 7.45e13[1/cm^2]
      Tref_fl = 300[K]
    CaugheyThomasMobilityModel
      alphan0_ct = 1.11
      alphap0_ct = 1.21
      vn0_ct = 1e7[cm/s]
      vp0_ct = 8.37e6[cm/s]
      betan1_ct = 0.66
      betap1_ct = 0.17
      betan2_ct = -0.87
      betap2_ct = -0.52
      Tref_ct = 300[K]
    SemicondMaterial "Semiconductor material"
      Eg0 = 1.12[V]
      chi0 = 4.05[V]
      Nv = (T/300[K])^(3/2)*1.04e19[1/cm^3]
      Nc = (T/300[K])^(3/2)*2.8e19[1/cm^3]
      mun = 1450[cm^2/(V*s)]
      mup = 500[cm^2/(V*s)]
    LombardiSurfaceMobilityModel
      deltan_ls = 5.82e14[V/s]
      deltap_ls = 2.05e14[V/s]
      mun1_ls = 4.75e7[cm^2/(V*s)]
      mup1_ls = 9.93e7[cm^2/(V*s)]
      mun2_ls = 1.74e5[cm^2/(V*s)]
      mup2_ls = 8.84e5[cm^2/(V*s)]
      alphan_ls = 0.125
      alphap_ls = 0.0317
      Tref_ls = 1[K]
      Eref_ls = 1[V/cm]
      Nref_ls = 1[1/cm^3]
    ImpactIonization
      an = 0.426[1/V]
      ap = 0.243[1/V]
      bn = 4.81E5[V/cm]
      bp = 6.53E5[V/cm]
      cnii = 3.05E-4[1/K]
      cpii = 5.35E-4[1/K]
      dn = 6.86E-4[1/K]
      dp = 5.67E-4[1/K]
    SlotboomModel
      Eref_sb = 0.00692[V]
      Nref_sb = 1.3e17[1/cm^3]
      alpha_sb = 0.5
    JainRoulstonModel
      An_jr = 3.5e-8[V]
      Bn_jr = 0[V]
      Cn_jr = 0[V]
      Ap_jr = 3.5e-8[V]
      Bp_jr = 0[V]
      Cp_jr = 0[V]
      Nref_jr = 1[1/cm^3]
      alpha_jr = 0.5
    KlaassenUnifiedMobilityModel
      T_ref_kl = 300[K]
      mu_e_max_kl = 1414.0[cm^2/V/s]
      mu_h_max_kl = 470.5[cm^2/V/s]
      mu_e_min_kl = 68.5[cm^2/V/s]
      mu_h_min_kl = 44.9[cm^2/V/s]
      theta_e_kl = 2.285
      theta_h_kl = 2.247
      alpha_e_1_kl = 0.711
      alpha_h_1_kl = 0.719
      N_ref_e_1_kl = 9.20e16[cm^-3]
      N_ref_h_1_kl = 2.23e17[cm^-3]
      c_D_kl = 0.21
      c_A_kl = 0.50
      N_ref_D_kl = 4.0e20[cm^-3]
      N_ref_A_kl = 7.2e20[cm^-3]
      f_BH_kl = 3.828
      f_CW_kl = 2.459
      N_BH_kl = 1.36e20[cm^-3]
      P_CW_kl = 3.97e13
      s_1_kl = 0.89233
      s_2_kl = 0.41372
      s_3_kl = 0.19778
      s_4_kl = 0.28227
      s_5_kl = 0.005978
      s_6_kl = 1.80618
      s_7_kl = 0.72169
      r_1_kl = 0.7643
      r_2_kl = 2.2999
      r_3_kl = 6.5502
      r_4_kl = 2.3670
      r_5_kl = -0.01552
      r_6_kl = 0.6478
      m_e_kl = me_const
      m_h_kl = 1.258*me_const

Physics
  semi: Semiconductor on all domains
    dependent variable V
    smm1: SemiconductorMaterialModel (default)
    ins1: Insulation (default)
    zc1: ZeroCharge (default)
    ii1: InsulatorInterface (default)
    cont1: Continuity "Continuity/Heterojunction 1" (default)
    init1: init "Initial Values 1" (default)
    adm1: AnalyticDopingModel on domains 1 | NAc = p_type_c
    adm2: AnalyticDopingModel on domains 2 | impurityType = donor; NAc = p_type_c; NDc = n_type_c

Mesh
  mesh1 "Mesh 1" (physics-controlled)
    size: MeshSizeDefault | table = semi

Studies
  std1 "Study 1"
    semie: SemiconductorEquilibrium

Solver configurations
  sol1 "Solution 1" (study std1)
    v1: Variables "Dependent Variables 1"
    s1: Stationary "Stationary Solver 1" | stol = 1.0E-6
      fc1: FullyCoupled | linsolver = d1; initstep = 0.1; minsteprecovery = 0.001; maxiter = 50
      d1: Direct

Datasets
  dset1: Solution | solution = sol1
  cln1: CutLine2D | data = dset1; genpoints = {{0.00376643, 0.108169}, {1.00276, 0.100445}}

Plots
  pg1: PlotGroup2D "Electron Concentration (semi)" | data = dset1
    surf1: Surface | expr = semi.N; unit = 1/cm^3
  pg2: PlotGroup2D "Hole Concentration (semi)" | data = dset1
    surf1: Surface | expr = semi.P; unit = 1/cm^3
  pg3: PlotGroup2D "Electric Potential (semi)" | data = dset1
    surf1: Surface | expr = abs(semi.N-semi.P)
  pg4: PlotGroup2D "Net Dopant Concentration (semi)"
    data = dset1
    title = Net Dopant Concentration \vert N<sub>d</sub> - N<sub>a</sub>\vert: P-type (Red), N-type (Blue)
    surf2: Surface "P-type" | expr = semi.Nnetdop; unit = 1/cm^3
      filt1: Filter | expr = semi.Na-semi.Nd > 1[1/cm^3]; useder = on
    surf1: Surface "N-type" | expr = semi.Nnetdop; unit = 1/cm^3
      filt1: Filter | expr = semi.Nd-semi.Na > 1[1/cm^3]; useder = on
  pg5: PlotGroup1D "1D Plot Group 5" | data = dset1
    lngr1: LineGraph | data = cln1; inputmode = linesecond; expr = abs(semi.N-semi.P)
    lngr2: LineGraph | data = cln1; inputmode = linesecond; expr = semi.N
    lngr3: LineGraph | data = cln1; inputmode = linesecond; expr = semi.P