// COMSOL Multiphysics 6.2.0.339 model "Solid stress.mph"
// Outline of the model tree

Geometry
  geom1 "Geometry 1" (2D, length unit m)
    r1: Rectangle | size = {10, 1}
    fin: Finalize "Form Union"

Materials
  mat1: Common "BS 460B (steel reinforcing bar) [solid]" on all domains
    def "Basic"
      thermalexpansioncoefficient = (alpha(T)+(Tempref-293[K])*if(abs(T-Tempref)>1e-3,(alpha(T)-alpha(Tempref))/(T-Tempref),d(alpha(T),T)))/(1+alpha(Tempref)*(Tempref-293[K]))
      heatcapacity = C(T)
      density = rho(T)
      alpha: Piecewise
        arg = T
        pieces = 
          {0.0, 680.0, 6.731035E-6+3.918624E-8*T^1-1.534406E-10*T^2+3.517965E-13*T^3-3.827522E-16*T^4+1.565546E-19*T^5}
          {680.0, 977.0, 8.614185E-6+1.013631E-8*T^1-2.26181E-12*T^2-1.569696E-15*T^3}
          {977.0, 1061.0, 6.292031E-5-4.915637E-8*T^1}
          {1061.0, 1144.0, -1.563678E-6+1.162025E-8*T^1}
        argunit = K
        fununit = 1/K
      C: Piecewise | arg = T; pieces = {293.0, 948.16, 390.15549+0.360644608*T^1-4.47692602E-4*T^2+6.0790633E-7*T^3}; argunit = K; fununit = J/(kg*K)
      rho: Piecewise
        arg = T
        pieces = 
          {0.0, 60.0, 7907.978-0.01549395*T^1}
          {60.0, 977.0, 7911.3-0.01678428*T^1-8.018711E-4*T^2+1.172796E-6*T^3-1.015971E-9*T^4+3.677737E-13*T^5}
          {977.0, 1061.0, 7116.994+0.5195388*T^1}
          {1061.0, 1144.0, 8166.523-0.4696497*T^1}
        argunit = K
        fununit = kg/m^3
    ThermalExpansion
      alphatan = CTE(T)
      dL = (dL(T)-dL(Tempref))/(1+dL(Tempref))
      dL: Piecewise
        arg = T
        pieces = 
          {0.0, 50.0, -0.002022973+3.918919E-7*T^1}
          {50.0, 212.0, -0.002063267-3.508062E-7*T^1+2.838477E-8*T^2}
          {212.0, 977.0, -0.00252395773+5.644256E-6*T^1+1.0799E-8*T^2-1.801872E-12*T^3-1.569701E-15*T^4}
          {977.0, 1061.0, 0.03264232-2.297313E-5*T^1}
          {1061.0, 1144.0, -0.01351301+2.053771E-5*T^1}
        argunit = K
      CTE: Piecewise | arg = T; pieces = {293.0, 1065.0, 5.044861E-6+2.5188E-8*T^1-1.418195E-11*T^2}; argunit = K; fununit = 1/K
    Enu "Young's modulus and Poisson's ratio"
      E = E(T)
      nu = nu(T)
      E: Piecewise
        arg = T
        pieces = 
          {4.0, 273.0, 2.217366E11+5020008.0*T^1-305140.4*T^2+926.6601*T^3-1.145454*T^4}
          {273.0, 1050.0, 2.11026989E11+3.572844E7*T^1-106319.6*T^2}
          {1050.0, 1500.0, 2.02449497E11-6.77381E7*T^1}
        argunit = K
        fununit = Pa
      nu: Piecewise
        arg = T
        pieces = 
          {4.0, 120.0, 0.2850355-1.662951E-6*T^1}
          {120.0, 273.0, 0.28474914-7.147353E-6*T^1+6.558945E-8*T^2}
          {273.0, 1053.0, 0.271114512+7.030261E-5*T^1-3.856929E-8*T^2+1.246582E-11*T^3}
          {1053.0, 1500.0, 0.316398425-1.242823E-6*T^1+1.661461E-9*T^2}
        argunit = K
    KG "Bulk modulus and shear modulus"
      K = kappa(T)
      G = mu(T)
      mu: Piecewise
        arg = T
        pieces = 
          {4.0, 273.0, 8.626526E10+1636497.0*T^1-108981.6*T^2+291.1261*T^3-0.3377859*T^4}
          {273.0, 1050.0, 8.30237093E10+9184755.0*T^1-38834.5*T^2}
          {1050.0, 1500.0, 7.69464143E10-2.580357E7*T^1}
        argunit = K
        fununit = Pa
      kappa: Piecewise
        arg = T
        pieces = 
          {4.0, 100.0, 1.800573E11-3478717.0*T^1+151512.1*T^2-5485.327*T^3+28.28329*T^4}
          {100.0, 273.0, 1.81842391E11-4.023792E7*T^1+84204.68*T^2-93.09453*T^3}
          {273.0, 1500.0, 1.84220483E11-2.509462E7*T^1-28588.37*T^2}
        argunit = K
        fununit = Pa

Physics
  solid: SolidMechanics on all domains
    dependent variable u = {u, v, w}
    lemm1: LinearElasticModel "Linear Elastic Material 1" (default)
    free1: Free (default)
    init1: init "Initial Values 1" (default)
    fix1: Fixed "Fixed Constraint 1" on boundaries 1
    bndl1: BoundaryLoad on boundaries 4 | LoadType = TotalForce; Ftot = {0, -5, 0}

Mesh
  mesh1 "Mesh 1" (physics-controlled)
    size: MeshSizeDefault | hauto = 2

Studies
  std1 "Study 1"
    stat: Stationary

Solver configurations
  sol1 "Solution 1" (study std1)
    v1: Variables "Dependent Variables 1"
    s1: Stationary "Stationary Solver 1"
      dDef: Direct
      fc1: FullyCoupled | linsolver = dDef

Datasets
  dset1: Solution | solution = sol1

Plots
  pg1: PlotGroup2D "Stress (solid)" | data = dset1
    surf1: Surface | expr = solid.misesGp
      def: Deform "Deformation" | expr = {u, v}; descr = Displacement field